ORIGIN := 1
n := 36
m := 22
A :=
    for j ∈ 1 .. m
        for i ∈ 1 .. n/2
            A[i, j] ← min(-n - i, m - j)
        for i ∈ n/2 + 1 .. n
            A[i, j] ← max(-n - i, m - j)
    A
D :=
    D ← 0
    for i ∈ 1 .. m
        C ← 0
        for j ∈ 1 .. n
            C ← 0 if A[j, i] < 0
            C ← 1
        D ← D + 1 if C < 0
    D
A = [
    -37, -37, -37, -37, -37, -37, -37, -37, -37, -37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;
    -38, -38, -38, -38, -38, -38, -38, -38, -38, -38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;
    -39, -39, -39, -39, -39, -39, -39, -39, -39, -39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;
    -40, -40, -40, -40, -40, -40, -40, -40, -40, -40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;
    -41, -41, -41, -41, -41, -41, -41, -41, -41, -41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;
    -42, -42, -42, -42, -42, -42, -42, -42, -42, -42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;
    -43, -43, -43, -43, -43, -43, -43, -43, -43, -43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;
    -44, -44, -44, -44, -44, -44, -44, -44, -44, -44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;
    -45, -45, -45, -45, -45, -45, -45, -45, -45, -45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;
    -46, -46, -46, -46, -46, -46, -46, -46, -46, -46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]
D = 0
STR :=
    STR ← "NO"
    for i ∈ 1 .. m
        MaxEnd ← 0
        for j ∈ 1 .. n
            MaxEnd ← A[j, i] if A[j, i] > MaxEnd
            MaxEnd
        STR ← "YES" if MaxEnd == A[36, i]
    STR
STR = "YES"
GG :=
    GG ← 0
    Y ← -53
    for i ∈ 1 .. n
        for j ∈ 1 .. m
            GG if i/2 ≤ 0
            otherwise
                GG ← GG + (A[i, j]*A[i, j]) if A[i, j] < Y
        GG
    GG
GG = 64152
